OpenVSP model (file version 5), 17 components.
Geometry view with OpenVSP parameter names; values to 6 digits, angles in degrees, lengths in the model's unit.
Overall bounding box: X_Min=0 X_Len=29.3693 Y_Min=-14.2725 Y_Len=28.423 Z_Min=0 Z_Len=9.81575

Fuselage "Fuselage — plan-derived loft"
  location (X Y Z) 0 0 0, rotation 0 0 0
  bounding box size 29.3693 3.42477 7.26865
  Design: Length=14.0194
  cross sections:
    n   XLocPercent  YLocPercent  ZLocPercent  shape
    0   0            0            0.21         point
    1   0.032258     0            0.216998     ellipse Ellipse_Height=0.644938 Ellipse_Width=0.995168
    2   0.0645161    0            0.221784     ellipse Ellipse_Height=0.964718 Ellipse_Width=1.50322
    3   0.0967742    0            0.225578     ellipse Ellipse_Height=1.23072 Ellipse_Width=1.90013
    4   0.129032     0            0.229277     ellipse Ellipse_Height=1.44838 Ellipse_Width=2.2207
    5   0.16129      0            0.232755     ellipse Ellipse_Height=1.62794 Ellipse_Width=2.3637
    6   0.193548     0            0.23587      ellipse Ellipse_Height=1.77625 Ellipse_Width=2.50747
    7   0.225806     0            0.238497     ellipse Ellipse_Height=1.89101 Ellipse_Width=2.84413
    8   0.25018      0            0.240047     ellipse Ellipse_Height=1.9558 Ellipse_Width=2.95485
    9   0.258064     0            0.236608     ellipse Ellipse_Height=1.86463 Ellipse_Width=2.99067
    10  0.290323     0            0.232464     ellipse Ellipse_Height=1.76571 Ellipse_Width=3.12438
    11  0.322581     0            0.231733     ellipse Ellipse_Height=1.75345 Ellipse_Width=3.2132
    12  0.354839     0            0.231716     ellipse Ellipse_Height=1.75395 Ellipse_Width=3.29791
    13  0.387097     0            0.231745     ellipse Ellipse_Height=1.75312 Ellipse_Width=3.34525
    14  0.419355     0            0.231872     ellipse Ellipse_Height=1.74957 Ellipse_Width=3.39066
    15  0.451613     0            0.232062     ellipse Ellipse_Height=1.74423 Ellipse_Width=3.40896
    16  0.483871     0            0.232252     ellipse Ellipse_Height=1.7389 Ellipse_Width=3.42147
    17  0.492384     0            0.232302     ellipse Ellipse_Height=1.7375 Ellipse_Width=3.42477
    18  0.516129     0            0.232442     ellipse Ellipse_Height=1.73358 Ellipse_Width=3.41502
    19  0.548387     0            0.232565     ellipse Ellipse_Height=1.73014 Ellipse_Width=3.39542
    20  0.580645     0            0.232722     ellipse Ellipse_Height=1.72573 Ellipse_Width=3.36949
    21  0.612903     0            0.232756     ellipse Ellipse_Height=1.72479 Ellipse_Width=3.33024
    22  0.626382     0            0.232756     ellipse Ellipse_Height=1.72479 Ellipse_Width=3.31383
    23  0.645161     0            0.249079     ellipse Ellipse_Height=2.18395 Ellipse_Width=3.2892
    24  0.677482     0            0.277406     ellipse Ellipse_Height=2.98715 Ellipse_Width=3.23387
    25  0.709677     0            0.275154     ellipse Ellipse_Height=2.93839 Ellipse_Width=3.17842
    26  0.741936     0            0.273484     ellipse Ellipse_Height=2.88519 Ellipse_Width=3.11579
    27  0.774194     0            0.272539     ellipse Ellipse_Height=2.79193 Ellipse_Width=3.05208
    28  0.79512      0            0.272046     ellipse Ellipse_Height=2.70955 Ellipse_Width=3.01194
    29  0.797249     0            0.271789     ellipse Ellipse_Height=2.69427 Ellipse_Width=3.00598
    30  0.798048     0            0.260375     ellipse Ellipse_Height=3.01038 Ellipse_Width=3.00374
    31  0.806452     0            0.26036      ellipse Ellipse_Height=2.96947 Ellipse_Width=2.98018
    32  0.83871      0            0.26069      ellipse Ellipse_Height=2.80154 Ellipse_Width=2.88283
    33  0.870968     0            0.262312     ellipse Ellipse_Height=2.59737 Ellipse_Width=2.7788
    34  0.903226     0            0.265446     ellipse Ellipse_Height=2.35084 Ellipse_Width=2.66339
    35  0.935484     0            0.270611     ellipse Ellipse_Height=2.04735 Ellipse_Width=2.54053
    36  0.967742     0            0.278172     ellipse Ellipse_Height=1.67667 Ellipse_Width=2.40775
    37  1            0            0.278056     ellipse Ellipse_Height=0.92558 Ellipse_Width=2.25944

Wing "Main Wing"
  location (X Y Z) 7.88389 0 3.76954, rotation 0 0 0
  symmetric about XZ
  bounding box size 7.26994 28.125 0.801352
  totals: TotalSpan=28.125 TotalProjectedSpan=28.125 TotalChord=3.14854 TotalArea=88.5526 TotalAR=8.93272 MAC=3.36373
  root: chord 4.58203, twist 0, airfoil file "EPPLER 1230 AIRFOIL"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 BaseThickChord=0.175704 ThickChord=0.175704
  sections:
    n  Span     Root_Chord  Tip_Chord  Area     Sweep    Sweep_Location  Dihedral  Twist  Twist_Location  tip airfoil
    1  14.0625  4.58203     1.71505    44.2763  21.5838  0               0         -6.5   0.25            as above

Wing "Canard — Roncz 1145MS verification needed"
  location (X Y Z) 2.13945 0 3.94089, rotation 0 0 0
  symmetric about XZ
  bounding box size 1.0286 12.5636 0.195349
  totals: TotalSpan=12.5636 TotalProjectedSpan=12.5636 TotalChord=1.0286 TotalArea=12.9229 TotalAR=12.2143 MAC=1.0286
  root: chord 1.0286, twist 0, airfoil file "RONCZ R1145MS AIRFOIL"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 BaseThickChord=0.188069 ThickChord=0.188069
  sections:
    n  Span     Root_Chord  Tip_Chord  Area     Sweep  Sweep_Location  Dihedral  Twist  Twist_Location  tip airfoil
    1  6.28182  1.0286      1.0286     6.46147  0      0               0         0      0.25            as above

Wing "Left main-wing tip winglet"
  location (X Y Z) 13.7442 -14.0625 3.76954, rotation 90 0 0
  bounding box size 3.125 0.298017 4.52509
  totals: TotalSpan=4.52509 TotalProjectedSpan=4.52509 TotalChord=1.07177 TotalArea=4.84987 TotalAR=4.22206 MAC=1.1961
  root: chord 1.70402, twist 0, airfoil file "EPPLER 1230 AIRFOIL"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 BaseThickChord=0.175704 ThickChord=0.175704
  sections:
    n  Span     Root_Chord  Tip_Chord  Area     Sweep    Sweep_Location  Dihedral  Twist  Twist_Location  tip airfoil
    1  4.52509  1.70402     0.439522   4.84987  30.6876  0               0         0      0.25            as above

Wing "Right main-wing tip winglet"
  location (X Y Z) 13.7442 14.0625 3.76954, rotation 90 0 0
  bounding box size 3.125 0.298017 4.52509
  totals: TotalSpan=4.52509 TotalProjectedSpan=4.52509 TotalChord=1.07177 TotalArea=4.84987 TotalAR=4.22206 MAC=1.1961
  root: chord 1.70402, twist 0, airfoil file "EPPLER 1230 AIRFOIL"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 BaseThickChord=0.175704 ThickChord=0.175704
  sections:
    n  Span     Root_Chord  Tip_Chord  Area     Sweep    Sweep_Location  Dihedral  Twist  Twist_Location  tip airfoil
    1  4.52509  1.70402     0.439522   4.84987  30.6876  0               0         0      0.25            as above

Pod "Left strake transition"
  location (X Y Z) 5.3589 -2.1 3.76954, rotation 0 0 0
  bounding box size 8.1554 0.75 0.75
  Design: FineRatio=21.7477 Length=8.1554

Pod "Right strake transition"
  location (X Y Z) 5.3589 2.1 3.76954, rotation 0 0 0
  bounding box size 8.1554 0.75 0.75
  Design: FineRatio=21.7477 Length=8.1554

Pod "Rear engine cowl"
  location (X Y Z) 11.9694 0 5.61386, rotation 0 0 0
  bounding box size 2.05 1.65 1.65
  Design: FineRatio=2.48485 Length=2.05

Pod "Pusher propeller spinner"
  location (X Y Z) 14.0645 0 4.22677, rotation 0 0 0
  bounding box size 1.35102 0.924684 0.924684
  Design: FineRatio=2.92211 Length=1.35102

Propeller "Pusher propeller disk — reference only"
  location (X Y Z) 14.1918 0 4.22677, rotation 0 0 0
  bounding box size 0.282555 4.4647 5.10874
  Design: Diameter=5.68555 NumBlade=3 Beta34=20 UseBeta34Flag=1 Feather=0 Rotate=0 Precone=0 ReverseFlag=0 FoldAngle=0 PropMode=0 AF=151.538 CLi=0.538798 Chord=0.177656 Solidity=0.169649 ConstructXoC=0.5 FeatherAxisXoC=0.5 FeatherOffsetXoC=0
  cross sections:
    n  RadiusFrac  shape
    0  0.2         ellipse Ellipse_Height=0.113711 Ellipse_Width=0.227422
    1  0.4         NACA 16-series Chord=0.472612 IdealCl=0.7 ThickChord=0.144074
    2  1           NACA 16-series Chord=0.369561 IdealCl=0.2 ThickChord=0.03
  Chord along r/R (cubic Bezier): 0.2: 0.08, 0.333333: 0.15, 0.466667: 0.2, 0.6: 0.2, 0.716667: 0.2, 0.833333: 0.2, 0.95: 0.2, 0.966667: 0.2, 0.983333: 0.2, 1: 0.13
  Twist along r/R (PCHIP): 0.2: 46.75, 0.75: 20, 1: 13
  Thick along r/R (cubic Bezier): 0.2: 0.5, 0.233333: 0.3, 0.266667: 0.225, 0.3: 0.2, 0.4: 0.125, 0.5: 0.115, 0.6: 0.1, 0.733333: 0.075, 0.866667: 0.055, 1: 0.03
  CLI along r/R (cubic Bezier): 0.2: 0, 0.266667: 0.7, 0.333333: 0.7, 0.4: 0.7, 0.466667: 0.7, 0.533333: 0.7, 0.6: 0.7, 0.733333: 0.7, 0.866667: 0.7, 1: 0.2

Pod "Nose gear  fairing placeholder"
  location (X Y Z) 2.45 0 0.417471, rotation 0 0 0
  bounding box size 1.3 0.834941 0.834941
  Design: FineRatio=3.11399 Length=1.3

Pod "Left main gear  fairing placeholder"
  location (X Y Z) 8.15 -2.94238 0.432617, rotation 0 0 0
  bounding box size 1.6 0.865234 0.865234
  Design: FineRatio=3.69842 Length=1.6

Pod "Right main gear  fairing placeholder"
  location (X Y Z) 8.15 2.94238 0.432617, rotation 0 0 0
  bounding box size 1.6 0.865234 0.865234
  Design: FineRatio=3.69842 Length=1.6

Pod "Front occupants mass envelope"
  location (X Y Z) 4.7 0 5.21386, rotation 0 0 0
  bounding box size 1.65 2.2 2.2
  Design: FineRatio=1.5 Length=1.65

Pod "Rear occupants mass envelope"
  location (X Y Z) 7.05 0 5.18386, rotation 0 0 0
  bounding box size 1.45 2.2 2.2
  Design: FineRatio=1.31818 Length=1.45

Pod "Left fuel volume envelope"
  location (X Y Z) 7.85 -2.1 4.96386, rotation 0 0 0
  bounding box size 2.5 0.65 0.65
  Design: FineRatio=7.69231 Length=2.5

Pod "Right fuel volume envelope"
  location (X Y Z) 7.85 2.1 4.96386, rotation 0 0 0
  bounding box size 2.5 0.65 0.65
  Design: FineRatio=7.69231 Length=2.5
